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/batch
! ANSYS input file written by Workbench version 2021 R1
! File used for geometry attach: C:\Users\vinig\Desktop\codes\TCC-assets\programas\ansys\simulacao_FE_files\dp0\SYS\DM\SYS.agdb
/title,simulacao_FE--Modal (A5)
/COM,/COM,     MechanicalDropTest, 2.0
/com,--- Data in consistent MKS units. See Solving Units in the help system for more information.
/units,MKS
/prep7
! Turn off shape checking because checks already performed inside WB mesher.
! See help system for more information.
SHPP,OFF,,NOWARN
etcon,set             ! allow ANSYS to choose best KEYOP's for 180x elements, resets any applicable keyopt to MAPDL defaults
/com,*********** Nodes for the whole assembly ***********
nblock,3,,2799
(1i9,3e20.9e3)
        1    -4.518781713E-03     8.114621888E-02     5.000000000E-03
        2     6.487601933E-02    -4.352253022E-02     5.000000000E-03
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-1
/com,*********** Nodes for all Remote Points ***********
nblock,3
(1i9,3e20.9e3)
     2546     0.000000000E+00     0.000000000E+00     3.050000000E-01
     2547     0.000000000E+00     0.000000000E+00    -2.950000000E-01
     2548     0.000000000E+00     0.000000000E+00    -2.950000000E-01
     2549     0.000000000E+00     0.000000000E+00    -2.950000000E-01
     2550     0.000000000E+00     0.000000000E+00     3.050000000E-01
     2551     0.000000000E+00     0.000000000E+00     3.050000000E-01
-1
/com,*********** Elements for Body 1 "Disco" ***********
et,1,186
keyo,1,2,1          ! set full integration on SOLID186
eblock,19,solid,,392
(19i9)
        1        1        1        1        0        0        0        0       20        0        1        1      629      107      609      282      660      176      619
      687     1171     1170      686     1649     1426     1425     1647      683     2349     1168     2317
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-1
/com,*********** Elements for Body 2 "Line Body" ***********
et,2,188
keyo,2,3,2
eblock,19,solid,,61
(19i9)
        2        2        2        2        0        0        0        0        3        0      393     2423     2425     2485
        2        2        2        2        0        0        0        0        3        0      394     2425     2426     2486
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-1
/com,*********** Send User Defined Coordinate System(s) ***********
csys,0
toffst,273.15,  ! Temperature offset from absolute zero
/com,*********** Set Reference Temperature ***********
tref,22.
/com,*********** Send Materials ***********
MP,DENS,1,7850,	! kg m^-3
MP,ALPX,1,1.2e-05,	! C^-1
MP,C,1,434,	! J kg^-1 C^-1
MP,KXX,1,60.5,	! W m^-1 C^-1
MP,RSVX,1,1.7e-07,	! kg m^3 A^-2 s^-3
MP,EX,1,200000000000,	! Pa
MP,NUXY,1,0.3,
MP,MURX,1,10000,

MP,DENS,2,7850,	! kg m^-3
MP,ALPX,2,1.2e-05,	! C^-1
MP,C,2,434,	! J kg^-1 C^-1
MP,KXX,2,60.5,	! W m^-1 C^-1
MP,RSVX,2,1.7e-07,	! kg m^3 A^-2 s^-3
MP,EX,2,200000000000,	! Pa
MP,NUXY,2,0.3,
MP,MURX,2,10000,

/com,*********** Send Beam Properties ***********
SECTYPE,2,BEAM,CSOL
SECDATA,6.35e-003
secoffset,cent

!************************* Model Summary ********************
!Disco,	Structural Steel,	matid,	1
!Line Body,	Structural Steel,	matid,	2
!************************* End Model Summary ********************
/com,*********** Create Contact "Bonded - Line Body To Disco" ***********
*set,tid,4
*set,cid,3
r,tid
r,cid
et,tid,170
et,cid,175
mat,3
real,3
type,3
en,1026,2423
en,1027,2454
eblock,10,,,16
(15i9)
     1028        4        3        4        0      510      519      518      517     2167     2182     2180     2166
     1029        4        3        4        0      502      508      519      510     2150     2163     2167     2151
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-1
keyo,cid,10,0              ! adjust contact stiffness each NR iteration (from Program Controlled setting)
keyo,cid,12,5              ! bonded always
keyo,cid,2,0               ! augmented Lagrange (from Program Controlled setting)
keyo,cid,9,1               ! ignore initial gaps/penetration
keyo,cid,7,0               ! No Prediction
rmod,cid,3,10.      ! FKN
rmod,cid,5,0.       ! ICONT
rmod,cid,6,-1.5e-002          ! PINB
rmod,cid,10,0.      ! CNOF
rmod,cid,12,0.      ! FKT
rmod,cid,36,34      ! WB DSID
nsel,all
esel,all
/com,*********** Create Remote Point "Internal Remote Point 5" ***********
! -------- Remote Point Used by "Remote Displacement" --------
*set,_npilot,2546
_npilot63=_npilot
et,5,170
type,5
real,5
mat,5
keyo,5,2,1              ! don't fix pilot node
keyo,5,4,111111
tshape,pilo
en,1044,2546        ! create pilot node for rigid link
tshape
en,1045,2546,2455
/com,*********** Create Remote Point "Internal Remote Point 6" ***********
! -------- Remote Point Used by "Remote Displacement 2" --------
*set,_npilot,2547
_npilot66=_npilot
et,6,170
type,6
real,6
mat,6
keyo,6,2,1              ! don't fix pilot node
keyo,6,4,111111
tshape,pilo
en,1046,2547        ! create pilot node for rigid link
tshape
en,1047,2547,2424
/com,*********** Create Bearing Connection "Ground To Line Body" ***********
!
! Setup Bearing Connection For Reference Set which is Grounded
d,2548,all
*set,_sid,7
et,_sid,214            ! Combi214, Bearing-Damper Element
keyo,_sid,2,0     ! XY Plane
keyo,_sid,3,0     ! Symmetric [K] and [C]
r,_sid,684180000.,684180000.,0.,0.,0.,0.
rmore,0.,0.
mat,_sid
real,_sid
type,_sid
en,1018,2548,2424
/com,*********** Create Bearing Connection "Ground To Line Body" ***********
!
! Setup Bearing Connection For Reference Set which is Grounded
d,2550,all
*set,_sid,8
et,_sid,214            ! Combi214, Bearing-Damper Element
keyo,_sid,2,0     ! XY Plane
keyo,_sid,3,0     ! Symmetric [K] and [C]
r,_sid,684180000.,684180000.,0.,0.,0.,0.
rmore,0.,0.
mat,_sid
real,_sid
type,_sid
en,1019,2550,2455
/com,*********** Construct Remote Displacement ***********

*DIM,_loadvari62uz,TABLE,1,1,1,TIME,
! Time values
_loadvari62uz(1,0,1) = 1.
! Load values
_loadvari62uz(1,1,1) = 0.


*DIM,_loadvari62rotz,TABLE,1,1,1,TIME,
! Time values
_loadvari62rotz(1,0,1) = 1.
! Load values
_loadvari62rotz(1,1,1) = 0.

/com,*********** Construct Remote Displacement ***********

*DIM,_loadvari65uz,TABLE,1,1,1,TIME,
! Time values
_loadvari65uz(1,0,1) = 1.
! Load values
_loadvari65uz(1,1,1) = 0.


*DIM,_loadvari65rotz,TABLE,1,1,1,TIME,
! Time values
_loadvari65rotz(1,0,1) = 1.
! Load values
_loadvari65rotz(1,1,1) = 0.

d,2546,uz,%_loadvari62uz%
d,2546,rotz,%_loadvari62rotz%
d,2547,uz,%_loadvari65uz%
d,2547,rotz,%_loadvari65rotz%

/COM,*** Create a component for all remote displacements ***
CMBLOCK,REMOTEDISPALL,NODE,        2
(8i10)
      2546      2547

/com,*********** Define Rotational Velocity ***********
esel,all
cm,cm_rotvelcity51,elem
fini
/solu
antype,2                   ! modal analysis
_thickRatio=  0     ! Ratio of thick parts in the model
modopt,qrdamp,5,,,on	! calculate complex eigen solution
qrdopt,on
coriolis,yes,,,yes,no
outres,erase
outres,all,none
outres,nsol,all
outres,etmp,all
esel,s,type,,2
esel,a,type,,7,8
cm,_elmisc,elem
esel,all
outres,misc,all,_elmisc
mxpand,,,,yes,,no             ! expand requested element results, but not write them to file.mode
dmpopt,esav,no
dmpopt,emat,no
dmpopt,full,no
/com,---------------- Campbell diagram point 1 ----------------
cmom,cm_rotvelcity51,0.,0.,10.,0.,0.,0.
! *********** WB SOLVE COMMAND ***********
! check interactive state
*get,ANSINTER_,active,,int
*if,ANSINTER_,ne,0,then
/eof
*endif
solve
/com *************** Write FE CONNECTORS *********
CEWRITE,file,ce,,INTE
/com,---------------- Campbell diagram point 2 ----------------
cmom,cm_rotvelcity51,0.,0.,100.,0.,0.,0.
solve
/com,---------------- Campbell diagram point 3 ----------------
cmom,cm_rotvelcity51,0.,0.,1000.,0.,0.,0.
solve
*get,_nmodalsolproc,active,0,numcpu
fini
/post1
prcamp,YES,,,,cm_rotvelcity51,,1
prcamp,YES,,,,cm_rotvelcity51,1,1
*do,i_freq,1,5
   *get,WHIRL_%i_freq%,CAMP,i_freq,WHRL
   *get,UKEY_%i_freq%,CAMP,i_freq,UKEY
   *do,j_rotvel,1,3
      *get,FREQ_%i_freq%_%j_rotvel%,CAMP,i_freq,FREQ,j_rotvel
      *get,STAB_%i_freq%_%j_rotvel%,CAMP,i_freq,STAB,j_rotvel
   *enddo
*enddo
*dim,_direction,CHAR,6,1
_direction(1) = 'X'
_direction(2) = 'Y'
_direction(3) = 'Z'
_direction(4) = 'X'
_direction(5) = 'Y'
_direction(6) = 'Z'
*get,_lastLS,active,0,set,LSTP
*get,_beginset,active,0,set,nset,first,_lastLS
*get,_endset,active,0,set,nset,last,_lastLS
_nummodes = 0
*if,_endset,gt,0,then
_nummodes = _endset - _beginset + 1
*endif
_nummodes=_nummodes/2
*do,i_mode,1,_nummodes
   *do,j_component,1,6
		*if,j_component,gt,3,then
			*get,PFACT_%i_mode%_%j_component%,MODE,%i_mode%,PFACT,IMAG,DIREC,_direction(%j_component%)
		*else
			*get,PFACT_%i_mode%_%j_component%,MODE,%i_mode%,PFACT,,DIREC,_direction(%j_component%)
		*endif
   *enddo
*enddo
*dim,_tmdirection,CHAR,6,1
_tmdirection(1) = 'X'
_tmdirection(2) = 'Y'
_tmdirection(3) = 'Z'
_tmdirection(4) = 'X'
_tmdirection(5) = 'Y'
_tmdirection(6) = 'Z'
*do,j_component,1,6
    *if,j_component,gt,3,then
        *get,TOTALMASS_%j_component%,ELEM,0,IOR,_tmdirection(%j_component%)
    *else
        *get,TOTALMASS_%j_component%,ELEM,0,MTOT,_tmdirection(%j_component%)
    *endif
*enddo
fini
