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/batch
! ANSYS input file written by Workbench version 18.1 RELEASE
! File used for geometry attach: C:\Users\vinig\OneDrive\Ambiente de Trabalho\Vinícius\TCC\Computacional\ANSYS\simulacao_FE_files\dp0\SYS\DM\SYS.agdb
/title,simulacao_FE--Modal (A5)
/com,--- Data in consistent NMM units. See Solving Units in the help system for more information.
/units,MPA
/prep7
! Turn off shape checking because checks already performed inside WB mesher.
! See help system for more information.
SHPP,OFF,,NOWARN
etcon,set             ! allow ANSYS to choose best KEYOP's for 180x elements
/com,*********** Nodes for the whole assembly ***********
nblock,3,,2799
(1i9,3e20.9e3)
        1   -4.518781713E+000    8.114621888E+001    5.000000000E+000
        2    6.487601933E+001   -4.352253022E+001    5.000000000E+000
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-1
/com,*********** Nodes for all Remote Points ***********
nblock,3
(1i9,3e20.9e3)
     2546    0.000000000E+000    0.000000000E+000    3.050000000E+002
     2547    0.000000000E+000    0.000000000E+000   -2.950000000E+002
     2548    0.000000000E+000    0.000000000E+000   -2.950000000E+002
     2549    0.000000000E+000    0.000000000E+000   -2.950000000E+002
     2550    0.000000000E+000    0.000000000E+000    3.050000000E+002
     2551    0.000000000E+000    0.000000000E+000    3.050000000E+002
-1
/com,*********** Elements for Body 1 "Disco" ***********
et,1,186
eblock,19,solid,,392
(19i9)
        1        1        1        1        0        0        0        0       20        0        1        1      629      107      609      282      660      176      619
      687     1171     1170      686     1649     1426     1425     1647      683     2349     1168     2317
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-1
/com,*********** Elements for Body 2 "Line Body" ***********
et,2,188
eblock,19,solid,,61
(19i9)
        2        2        2        2        0        0        0        0        3        0      393     2423     2425     2485
        2        2        2        2        0        0        0        0        3        0      394     2425     2426     2486
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-1
/com,*********** Send User Defined Coordinate System(s) ***********
csys,0
toffst,273.15,  ! Temperature offset from absolute zero
/com,*********** Send Materials ***********
MP,DENS,1,7.85e-09,	! tonne mm^-3
MP,ALPX,1,1.2e-05,	! C^-1
MP,C,1,434000000,	! mm^2 s^-2 C^-1
MP,KXX,1,60.5,	! tonne mm s^-3 C^-1
MP,RSVX,1,0.00017,	! ohm mm
MP,EX,1,200000,	! tonne s^-2 mm^-1
MP,NUXY,1,0.3,
MP,MURX,1,10000,

MP,DENS,2,7.85e-09,	! tonne mm^-3
MP,ALPX,2,1.2e-05,	! C^-1
MP,C,2,434000000,	! mm^2 s^-2 C^-1
MP,KXX,2,60.5,	! tonne mm s^-3 C^-1
MP,RSVX,2,0.00017,	! ohm mm
MP,EX,2,200000,	! tonne s^-2 mm^-1
MP,NUXY,2,0.3,
MP,MURX,2,10000,

/com,*********** Send Beam Properties ***********
SECTYPE,2,BEAM,CSOL
SECDATA,6.35

secoffset,cent
!************************* Model Summary ********************
!Disco,	Structural Steel,	matid,	1
!Line Body,	Structural Steel,	matid,	2
!************************* End Model Summary ********************
/com,*********** Create Contact "Bonded - Line Body To Disco" ***********
*set,tid,4
*set,cid,3
r,tid
r,cid
et,tid,170
et,cid,175
mat,3
real,3
type,3
en,464,2423
en,465,2454
eblock,10,,,16
(15i9)
      466        4        3        4        0      510      519      518      517     2167     2182     2180     2166
      467        4        3        4        0      502      508      519      510     2150     2163     2167     2151
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-1
keyo,cid,10,0              ! adjust contact stiffness each NR iteration (from Program Controlled setting)
keyo,cid,12,5              ! bonded always
keyo,cid,2,0               ! augmented Lagrange (from Program Controlled setting)
keyo,cid,9,1               ! ignore initial gaps/penetration
keyo,cid,7,0               ! No Prediction
rmod,cid,3,10.	! FKN
rmod,cid,5,0.	! ICONT
rmod,cid,6,-15.	! PINB
rmod,cid,10,0.	! CNOF
rmod,cid,12,0.	! FKT
rmod,cid,36,34	! WB DSID
nsel,all
esel,all
fini
/solu
rescontrol,,none
outres,erase
outres,all,none
outres,nsol
outres,strs
nldiag,cont,iter     ! needed to create file.cnd which hold initial conditions
cntr,print,1         ! needed to create file.cnd which hold initial conditions
esel,s,ename,,169,177
nsle
esln
nsle
cncheck,post
fini
